# 3d Lennard-Jones melt

units		    lj
atom_style	    atomic

lattice		    fcc ${density}
region		    box block 0 10 0 10 0 10
create_box	    1 box
create_atoms	1 box
mass		    1 1.0
timestep        0.001

velocity	    all create 2.5 87287 loop geom

pair_style	    lj/cut 2.5
pair_coeff	    1 1 1.0 1.0 2.5

neighbor	    0.3 bin
neigh_modify	every 20 delay 0 check no

fix		        1 all nve
fix             2 all langevin ${temp} ${temp} 10.0 48279

compute         temp all temp
compute         pe all pe
compute         ke all ke

dump		    mydump all custom 10 3_hw/1_task/1_dump_${density} id type xs ys zs

thermo		    10
run	            15000
